*HEADING
One element model of simple plane stress
deformation
*NODE
1,0.0,0.0
2,100.0,0.0
3,100.0,200.0
4,0.0,200.0
*ElEMENT,ELSET=ALL,TYPE=CPS4
1,1,2,3,4
*SOLID SECTION,ELSET=ALL,MAT=METAL
0.001
*MATERIAL,NAME=METAL
*ELASTIC
70.E9,0.3
*BOUNDARY
1,1,2,0.0
2,2,2,0.0
4,1,1,0.0
*STEP
*STATIC
*BOUNDARY
3,2,2,0.1
4,2,2,0.1
*NODE PRINT
U,RF
*EL PRINT
S,E
*RESTART,WRITE
*END STEP
