*HEADING
One element model of simple plane strain
loading
*NODE
1,0.0,0.0
2,50.0,0.0
3,50.0,50.0
4,0.0,50.0
*ElEMENT,ELSET=ALL,TYPE=CPE4
1,1,2,3,4
*SOLID SECTION,ELSET=ALL,MAT=METAL
200.0
*MATERIAL,NAME=METAL
*ELASTIC
70.E9,0.3
*BOUNDARY
1,1,2,0.0
2,2,2,0.0
4,1,1,0.0
*STEP
*STATIC
*BOUNDARY
3,2,2,-0.1
4,2,2,-0.1
2,1,1,-0.1
3,1,1,-0.1
*NODE PRINT
U,RF
*EL PRINT
S,E
*RESTART,WRITE
*END STEP
